*Heading
 Bulkhead model with 1st order tets for MCNP6 Class
** Job name: um_bulhead_tets_02 Model name: Model-1
** Generated by: Abaqus/CAE 6.13-1
*Preprint, echo=NO, model=NO, history=NO, contact=NO
**
** PARTS
**
*Part, name=Part-back_wall
*Node
      1,           7.,          17.,          14.
      2,           7.,          16.,          14.
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*Element, type=C3D4
   1,  717,  801,  802,  803
   2,  415,  801,  804,  805
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*Nset, nset=Set-material_tally_026, generate
    1,  1110,     1
*Elset, elset=Set-material_tally_026, generate
    1,  4058,     1
*Nset, nset=Set-2, generate
    1,  1110,     1
*Elset, elset=Set-2, generate
    1,  4058,     1
** Section: Section-iron
*Solid Section, elset=Set-2, material=Material-iron_026
,
*End Part
**
*Part, name=Part-front_wall
*Node
      1,           7.,           2.,          14.
      2,           7.,           0.,          14.
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*Element, type=C3D4
   1,  953,  954,  955,  956
   2,  953,  957,  958,  959
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*Nset, nset=Set-material_tally_026, generate
    1,  1657,     1
*Elset, elset=Set-material_tally_026, generate
    1,  6895,     1
*Nset, nset=Set-2, generate
    1,  1657,     1
*Elset, elset=Set-2, generate
    1,  6895,     1
** Section: Section-iron
*Solid Section, elset=Set-2, material=Material-iron_026
,
*End Part
**
*Part, name=Part-left_air
*Node
      1,          -1.,          16.,          14.
      2,          -1.,          10.,          14.
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*Element, type=C3D4
   1,  687,  739,  740,  741
   2,  742,  743,  744,  745
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*Nset, nset=Set-material_tally_02, generate
    1,  1742,     1
*Elset, elset=Set-material_tally_02, generate
    1,  8116,     1
*Nset, nset=Set-2, generate
    1,  1742,     1
*Elset, elset=Set-2, generate
    1,  8116,     1
** Section: Section-air
*Solid Section, elset=Set-2, material=Material-air_02
,
*End Part
**
*Part, name=Part-left_liner
*Node
      1,          -1.,           3.,          14.
      2,          -1.,           2.,          14.
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*Element, type=C3D4
   1,  995,  996,  997,  998
   2,  995,  999, 1000,  824
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*Nset, nset=Set-material_tally_082, generate
    1,  1560,     1
*Elset, elset=Set-material_tally_082, generate
    1,  6186,     1
*Nset, nset=Set-3, generate
    1,  1560,     1
*Elset, elset=Set-3, generate
    1,  6186,     1
** Section: Section-lead
*Solid Section, elset=Set-3, material=Material-lead_082
,
*End Part
**
*Part, name=Part-left_water
*Node
      1,          -1.,          10.,          14.
      2,          -1.,           3.,          14.
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*Element, type=C3D4
   1,  793,  794,  795,  796
   2,  793,  797,  798,  799
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*Nset, nset=Set-material_tally_01, generate
    1,  1916,     1
*Elset, elset=Set-material_tally_01, generate
    1,  8999,     1
*Nset, nset=Set-2, generate
    1,  1916,     1
*Elset, elset=Set-2, generate
    1,  8999,     1
** Section: Section-water
*Solid Section, elset=Set-2, material=Material-water_01
,
*End Part
**
*Part, name=Part-right_air
*Node
      1,           7.,          16.,          14.
      2,           7.,          10.,          14.
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*Element, type=C3D4
   1,  687,  739,  740,  741
   2,  742,  743,  744,  745
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*Nset, nset=Set-material_tally_02, generate
    1,  1742,     1
*Elset, elset=Set-material_tally_02, generate
    1,  8116,     1
*Nset, nset=Set-2, generate
    1,  1742,     1
*Elset, elset=Set-2, generate
    1,  8116,     1
** Section: Section-air
*Solid Section, elset=Set-2, material=Material-air_02
,
*End Part
**
*Part, name=Part-right_liner
*Node
      1,           7.,           4.,          14.
      2,           7.,           2.,          14.
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*Element, type=C3D4
   1, 469, 470, 471, 472
   2, 470, 473, 472, 474
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*Nset, nset=Set-material_tally_082, generate
   1,  798,    1
*Elset, elset=Set-material_tally_082, generate
    1,  3227,     1
*Nset, nset=Set-2, generate
   1,  798,    1
*Elset, elset=Set-2, generate
    1,  3227,     1
** Section: Section-lead
*Solid Section, elset=Set-2, material=Material-lead_082
,
*End Part
**
*Part, name=Part-right_water
*Node
      1,           7.,          10.,          14.
      2,           7.,           4.,          14.
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*Element, type=C3D4
   1,  687,  739,  740,  741
   2,  742,  743,  744,  745
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*Nset, nset=Set-material_tally_01, generate
    1,  1742,     1
*Elset, elset=Set-material_tally_01, generate
    1,  8116,     1
*Nset, nset=Set-2, generate
    1,  1742,     1
*Elset, elset=Set-2, generate
    1,  8116,     1
** Section: Section-water
*Solid Section, elset=Set-2, material=Material-water_01
,
*End Part
**
*Part, name=Part-stiffener
*Node
      1,           8.,          16.,          14.
      2,           8.,           2.,          14.
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*Element, type=C3D4
   1,  953,  954,  955,  956
   2,  953,  695,  957,  954
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*Nset, nset=Set-material_tally_026, generate
    1,  1653,     1
*Elset, elset=Set-material_tally_026, generate
    1,  6871,     1
*Nset, nset=Set-2, generate
    1,  1653,     1
*Elset, elset=Set-2, generate
    1,  6871,     1
** Section: Section-iron
*Solid Section, elset=Set-2, material=Material-iron_026
,
*End Part
**
**
** ASSEMBLY
**
*Assembly, name=Assembly
**
*Instance, name=Part-stiffener-1, part=Part-stiffener
         -7.,           0.,           0.
*End Instance
**
*Instance, name=Part-left_liner-1, part=Part-left_liner
*End Instance
**
*Instance, name=Part-left_water-1, part=Part-left_water
*End Instance
**
*Instance, name=Part-front_wall-1, part=Part-front_wall
*End Instance
**
*Instance, name=Part-left_air-1, part=Part-left_air
*End Instance
**
*Instance, name=Part-back_wall-1, part=Part-back_wall
*End Instance
**
*Instance, name=Part-right_liner-1, part=Part-right_liner
*End Instance
**
*Instance, name=Part-right_water-1, part=Part-right_water
*End Instance
**
*Instance, name=Part-right_air-1, part=Part-right_air
*End Instance
**
*End Assembly
**
** MATERIALS
**
*Material, name=Material-air_02
*Density
 -0.001205,
*Material, name=Material-iron_026
*Density
 -7.874,
*Material, name=Material-lead_082
*Density
 -11.35,
*Material, name=Material-water_01
*Density
-1.,
